OpenVSP model (file version 5), 6 components.
Geometry view with OpenVSP parameter names; values to 6 digits, angles in degrees, lengths in the model's unit.
Overall bounding box: X_Min=-0.8 X_Len=2.591 Y_Min=-2 Y_Len=4 Z_Min=-0.24 Z_Len=0.961221

Wing "Wing"
  location (X Y Z) 0 0 0, rotation 0 0 0
  symmetric about XZ
  bounding box size 0.397868 4 0.0556214
  mass: Density=0 Shell_Flag=0 Mass_Area=1 Mass_Prior=0
  totals: TotalSpan=4 TotalProjectedSpan=4 TotalChord=0.35425 TotalArea=1.37225 TotalAR=11.6597
  root: chord 0.399, twist 4.5, airfoil file "SG6042"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 BaseThickChord=0.10004 ThickChord=0.10004
  sections:
    n  Span  Root_Chord  Tip_Chord  Area      Sweep  Sweep_Location  Dihedral  Twist  Twist_Location  tip airfoil
    1  0.75  0.399       0.399      0.29925   0      0               0         4.5    0.25            as above
    2  1.25  0.399       0.22       0.386875  1.77   0               0         4.5    0.25            as above

Fuselage "Twin_Booms"
  location (X Y Z) -0.55 0.716 -0.02, rotation 0 0 0
  symmetric about XZ
  bounding box size 2.341 1.49317 0.0611734
  mass: Density=0 Shell_Flag=0 Mass_Area=1 Mass_Prior=0
  Design: Length=2.341
  cross sections:
    n  XLocPercent  YLocPercent  ZLocPercent  shape
    0  0            0            0            point
    1  0.05         0            0            circle Circle_Diameter=0.04
    2  0.95         0            0            as above
    3  1            0            0            point

Fuselage "Body"
  location (X Y Z) -0.8 0 -0.12, rotation 0 0 0
  bounding box size 1.4 0.24 0.24
  mass: Density=0 Shell_Flag=0 Mass_Area=1 Mass_Prior=0
  Design: Length=1.4
  cross sections:
    n  XLocPercent  YLocPercent  ZLocPercent  shape
    0  0            0            0            point
    1  0.257143     0            0            circle Circle_Diameter=0.24
    2  0.885714     0            0            as above
    3  1            0            0            point

Wing "A_Tail"
  location (X Y Z) 1.536 0 0.714, rotation 0 0 0
  symmetric about XZ
  bounding box size 0.255 1.46266 0.737801
  mass: Density=0 Shell_Flag=0 Mass_Area=1 Mass_Prior=0
  totals: TotalSpan=2.046 TotalProjectedSpan=1.44674 TotalChord=0.255 TotalArea=0.52173 TotalAR=4.01176
  root: chord 0.255, twist 0, NACA 4-series Camber=0 CamberLoc=0.2 ThickChord=0.08
  sections:
    n  Span   Root_Chord  Tip_Chord  Area      Sweep  Sweep_Location  Dihedral  Twist  Twist_Location  tip airfoil
    1  1.023  0.255       0.255      0.260865  0      0               -45       -2     0.25            as above

Blank "BlankGeom"
  location (X Y Z) 0.08 0 0, rotation 0 0 0
  Mass: Point_Mass=21.61 Point_Mass_Flag=1

Mesh "MeshGeom"
  location (X Y Z) 0 0 0, rotation 0 0 0

VSPAERO settings: Sref=1.3727 bref=4 cref=0.35675 Xcg=0.08 Ycg=0 Zcg=0 AlphaStart=-5 AlphaEnd=10 AlphaNpts=31 BetaStart=0 BetaEnd=0 BetaNpts=1 MachStart=0 MachEnd=0 MachNpts=1 ReCref=1e+07 Vinf=100 Rho=0.002377
